// SBML level 3 version 2

model EGFR_module()
  // model units - substance: substance, time: time_unit

  // Compartments:
  compartment cell = 1;
  compartment extra = 5000; extra is "extracellular space";
  compartment intra = 1;

  // Species:
  species Lig in extra = 1000/extra;
  species Egfr in cell = Vr/kt;
  species iEgfr in intra = 0;
  species Egfr_Lig in cell = 0;
  species iEgfr_Lig in intra = 0;
  species pEgfr_Lig in cell = 0;
  species ipEgfr_Lig in intra = 0;
  species $aRtot in cell;

  // Parameters:
  Vr = 0.242;
  kt = 0.0012;
  kx = 1;
  k4 = 0.003199994;
  k_4 = 0.002000673;
  ke = 0.007299479;
  kh = 0.0006826108;
  k7 = 0.06419427;
  k_7 = 0.2582213;

  // Assignment rules:
  aRtot := pEgfr_Lig + ipEgfr_Lig;

  // Reactions:
  J1: => Egfr; Vr;
  J2: Egfr => iEgfr; kt*Egfr;
  J3: iEgfr => ; kx*iEgfr;
  J4: Lig + Egfr -> Egfr_Lig; k4*Egfr*Lig - k_4*Egfr_Lig;
  J5: Egfr_Lig => iEgfr_Lig; ke*Egfr_Lig;
  J6: iEgfr_Lig => ; kh*iEgfr_Lig;
  J7: Egfr_Lig -> pEgfr_Lig; k7*Egfr_Lig - k_7*pEgfr_Lig;
  J8: pEgfr_Lig => ipEgfr_Lig; ke*pEgfr_Lig;
  J9: ipEgfr_Lig => ; kh*ipEgfr_Lig;

  // Unit definitions:
  unit nM = 1e-9 mole / litre;
  unit substance = 1e-9 mole; substance is "nmole";
  unit time_unit = second; time_unit is "s";
  unit per_nM = litre / (1e-9 mole);
  unit per_sec = 1 / second; per_sec is "s-1";
  unit nM_per_s = 1e-9 mole / (litre * second); nM_per_s is "nM/s";
  unit per_nMs = litre / (1e-9 mole * second); per_nMs is "nM-1 s-1";
end
